<?xml version="1.0"?>
<!--
  File:     Lycoming O-235.xml
  Author:   Aero-Matic v 0.8

  Inputs:
    name:           Lycoming O-235
    type:           piston
    power:          118 hp
    augmented?      no
    injected?       no
-->

<piston_engine name="Lycoming O-235">
  <minmp unit="INHG">          6.0 </minmp>
  <maxmp unit="INHG">         30.0 </maxmp>
  <displacement unit="IN3"> 188.80 </displacement>
  <minpitch>20</minpitch>
  <maxpitch>20</maxpitch>
  <maxhp>        118.00 </maxhp>
  <cycles>         2.0 </cycles>
  <idlerpm>      700.0 </idlerpm>
  <maxthrottle>    1.0 </maxthrottle>
  <minthrottle>    0.2 </minthrottle>
</piston_engine>
